f(x) := (e^(-2*cos(x)) - e^(-sin(2*x)))*e^(-cos(x))
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f1t(x) := d/dx(f(x)) → e^(-cos(x))*(2*cos(2*x)*e^(-sin(2*x)) + 2*e^(-2*cos(x))*sin(x)) + e^(-cos(x))*sin(x)*(e^(-2*cos(x)) - e^(-sin(2*x)))
f2t(x) := d^2/dx^2(f(x)) → 2*e^(-cos(x))*sin(x)*(2*cos(2*x)*e^(-sin(2*x)) + 2*e^(-2*cos(x))*sin(x)) - e^(-cos(x))*(4*e^(-sin(2*x))*cos(2*x)^2 - 4*e^(-2*cos(x))*sin(x)^2 + 4*sin(2*x)*e^(-sin(2*x)) - 2*e^(-2*cos(x))*cos(x)) + e^(-cos(x))*cos(x)*(e^(-2*cos(x)) - e^(-sin(2*x))) + e^(-cos(x))*sin(x)^2*(e^(-2*cos(x)) - e^(-sin(2*x)))
f3t(x) := d^3/dx^3(f(x)) → e^(-cos(x))*(8*cos(2*x)^3*e^(-sin(2*x)) - 2*e^(-2*cos(x))*sin(x) - 8*cos(2*x)*e^(-sin(2*x)) + 8*e^(-2*cos(x))*sin(x)^3 + 24*cos(2*x)*sin(2*x)*e^(-sin(2*x)) + 12*e^(-2*cos(x))*cos(x)*sin(x)) + 3*e^(-cos(x))*cos(x)*(2*cos(2*x)*e^(-sin(2*x)) + 2*e^(-2*cos(x))*sin(x)) - e^(-cos(x))*sin(x)*(e^(-2*cos(x)) - e^(-sin(2*x))) - 3*e^(-cos(x))*sin(x)*(4*e^(-sin(2*x))*cos(2*x)^2 - 4*e^(-2*cos(x))*sin(x)^2 + 4*sin(2*x)*e^(-sin(2*x)) - 2*e^(-2*cos(x))*cos(x)) + 3*e^(-cos(x))*sin(x)^2*(2*cos(2*x)*e^(-sin(2*x)) + 2*e^(-2*cos(x))*sin(x)) + e^(-cos(x))*sin(x)^3*(e^(-2*cos(x)) - e^(-sin(2*x))) + 3*e^(-cos(x))*cos(x)*sin(x)*(e^(-2*cos(x)) - e^(-sin(2*x)))
f4t(x) := d^4/dx^4(f(x))  # error: Возвращенный символьный результат слишком велик для отображения, но его можно использовать в последующих вычислениях, \если присвоить функции или переменной.
x := -3.26
f1(x, h) := (f(x + h) - f(x - h))/(2*h)
x = -3.26
ε1(x, h) := |(f1(x, h) - f1t(x))/f1t(x)|
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x1_min := 3.57e-6
ε1(x, x1_min) = 1.99454e-11
f12(x, h) := (f(x) - f(x - h))/h
ε12(x, h) := |(f12(x, h) - f1t(x))/f1t(x)|
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x12min := 2.48e-8
ε12(x, x12min) = 5.63916e-8
f2(x, h) := (f(x + h) - 2*f(x) + f(x - h))/h^2
ε2(x, h) := |(f2(x, h) - f2t(x))/f2t(x)|
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x2min := 0.0001424
ε2(x, x2min) = 2.48746e-8
f3(x, h) := (f(x + 2*h) - 2*f(x + h) + 2*f(x - h) - f(x - 2*h))/(2*h^3)
ε3(x, h) := |(f3(x, h) - f3t(x))/f3t(x)|
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x3min := 0.000508
ε3(x, x3min) = 8.512e-7
f4(x, h) := (f(x + 2*h) - 4*f(x + h) + 6*f(x) - 4*f(x - h) + f(x - 2*h))/h^4
ε4(x, h) := |(f4(x, h) - f4t(x))/f4t(x)|
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x4min := 0.00336
ε4(x, x4min) = 3.78183e-5
