# Исходная функция
f(x, t) := (e^(-2*cos(x)) - e^(-sin(2*x)))*e^(-cos(x))
# График функции | Данные для расчёта
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f(0, 0) = -0.318092
n := 1000
x[0] := 0.5
T := 5
# Метод Эйлера
# При n=100 | При n=200
m := 0 .. n
t1[0] := 0
t[0] := 0
m2 := 0 .. 2*n
xh2[0] := x[0]
h := (T - t[0])/n
h2 := h/2
x[m] := x[0]
t1[m2] := m2*h2
t[m] := m*h
xh2[m2 + 1] := xh2[m2] + h2*f(xh2[m2], t1[m2])
x[m + 1] := x[m] + h*f(x[m], t[m])
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# Интегрирование по варианту (12 вариант)
K1(x2, h, t) := h*f(x2, t)
K2(x2, h, t) := h*f(x2 + 1/4*K1(x2, h, t), t)
K3(x2, h, t) := h*f(x2 - 189/800*K1(x2, h, t) + 729/800*K2(x2, h, t), t)
K4(x2, h, t) := h*f(x2 + 214/891*K1(x2, h, t) + 1/33*K2(x2, h, t) + 650/891*K3(x2, h, t), t)
xh22[0] := x[0]
x2[0] := x[0]
xh22[m2 + 1] := xh22[m2] + 533/2106*K1(xh22[m2], h2, t1[m2]) + 800/1053*K3(xh22[m2], h2, t1[m2]) - 1/78*K4(xh22[m2], h2, t1[m2])
x2[m + 1] := x2[m] + 533/2106*K1(x2[m], h, t[m]) + 800/1053*K3(x2[m], h, t[m]) - 1/78*K4(x2[m], h, t[m])
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# Методы Рунге-Кутты
xx := 0.5
D(t, xx) := (e^(-2*cos(xx)) - e^(-sin(2*xx)))*e^(-cos(xx))
Z := rkfixed(xx, t[0], T, n, D)
Z2 := rkfixed(xx, t1[0], T, 2*n, D)
t[m] := Z[m, 0]
t1[m2] := Z2[m2, 0]
x1[m] := Z[m, 1]
xx1[m2] := Z2[m2, 1]
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xh2[2*n] = -1.51276
x[n] = -1.51257
xh22[2*n] = -1.51296
x2[n] = -1.51296
xx1[2*n] = -1.51296
x1[n] = -1.51296
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# Расчёт погрешностей
E(p, x1, x2) := |(x1 - x2)/(2^p - 1)|*2^p
E(1, xh2[2*n], x[n]) = 0.000393294
E(4, xh22[2*n], x2[n]) = 8.48107e-9
E(4, xx1[2*n], x1[n]) = 8.5687e-11
