FX(x) := (e^(-2*cos(x)) - e^(-sin(2*x)))*e^(-cos(x))
a := 0
b := 10
m := 255
p := π/(2*(m + 1))
d := (b - a)/2
h := (b - a)/m
s := (a + b)/2
ii := 0 .. m
xi[ii] := a + ii*h
delta := 2
md2(x) := rnd(x) - x/2
yi[ii] := FX(xi[ii]) + md2(delta)*0.25
n := 10
nn := m + 1
z := regress(xi, yi, n)
j := 0 .. m
ff(x) := interp(z, xi, yi, x)
tx[j] := min(xi) + j*(max(xi) - min(xi))/nn
fff[j] := ff(tx[j])
i := 0 .. m
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j := 0 .. m
DD[j] := |yi[j] - fff[j]|
DDD := sum((yi[kk] - fff[kk])^2, kk = 0 .. m)
DDD := DDD/(m - n) = 2.49837
e_cp := mean(DD) = 1.25041
e_max := max(DD) = 4.11627
jj := 0 .. m
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ff(x, n) := interp(regress(xi, yi, n), xi, yi, x)
j := 0 .. m
tx[j] := min(xi) + j*(max(xi) - min(xi))/(m + 1)
fff(j, n) := ff(tx[j], n)
DDD(n) := sum((yi[kk] - fff(kk, n))^2/(m - n), kk = 0 .. m)
nn := 3 .. 25
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DDD(3) = 16.4863
DDD(9) = 3.94467
DDD(19) = 0.147081
DDD(15) = 0.542413
DDD(22) = 0.106353
DDD(4) = 16.0757
DDD(10) = 2.49837
DDD(20) = 0.140476
DDD(5) = 11.3228
DDD(11) = 2.02682
DDD(16) = 0.377722
DDD(23) = 0.108597
DDD(6) = 10.8879
DDD(12) = 2.0355
DDD(17) = 0.35115
DDD(21) = 0.113055
DDD(24) = 1.31783
DDD(7) = 10.9317
DDD(13) = 0.731219
DDD(18) = 0.217974
DDD(25) = 0.453119
DDD(8) = 3.95468
DDD(14) = 0.680002
n := 15
nn := m + 1
z := regress(xi, yi, n)
ff(x) := interp(z, xi, yi, x)
j := 0 .. m
tx[j] := min(xi) + j*(max(xi) - min(xi))/nn
fff[j] := ff(tx[j])
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i := 0 .. m
