a := 0
c := -2
FX(x) := (e^(-2*cos(x)) - e^(-sin(2*x)))*e^(-cos(x))
d := 2
b := 10
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m := 8
n := 2^m
nn := n - 1
n = 256
ii := 0 .. nn
h := (b - a)/nn
xi[ii] := a + ii*h
delta := 2
md2(x) := rnd(x) - x/2
yi[ii] := FX(xi[ii]) + md2(delta)*0.25
i := 0 .. n
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k2 := 200
A := fft(yi)
k1 := 5
j := 0 .. n/2
j := 0 .. n/2
g2[j] := if(j ≤ k2, A[j], 0)
g1[j] := if(j ≤ k1, A[j], 0)
f2 := ifft(g2)
f1 := ifft(g1)
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iii := 0 .. 50
yi[iii] := 10
iii := 50 .. 255
yi[iii] := 20
AA := fft(yi)
kk1 := 15
j := 0 .. n/2
kk2 := 100
gg2[j] := if(j ≤ kk2, AA[j], 0)
gg1[j] := if(j ≤ kk1, AA[j], 0)
ff2 := ifft(gg2)
ff1 := ifft(gg1)
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